// COMSOL Multiphysics 6.1.0.252 model "2DGG.mph"
// Outline of the model tree
// Unit system: none

Parameters
  alpha = 1
  beta = 1
  M = 1
  gam = 1
  k = 1

Functions
  rn1: Random "随机 1" | nargs = 2; uniformrange = 0.2; seed = 113013

Variables
  var1 "变量 1"
    f1 = -alpha*eta1+beta*eta1^3+2*gam*eta1*(S-eta1^2)
    f2 = -alpha*eta2+beta*eta2^3+2*gam*eta2*(S-eta2^2)
    f3 = -alpha*eta3+beta*eta3^3+2*gam*eta3*(S-eta3^2)
    f4 = -alpha*eta4+beta*eta4^3+2*gam*eta4*(S-eta4^2)
    f5 = -alpha*eta5+beta*eta5^3+2*gam*eta5*(S-eta5^2)
    f6 = -alpha*eta6+beta*eta6^3+2*gam*eta6*(S-eta6^2)
    f7 = -alpha*eta7+beta*eta7^3+2*gam*eta7*(S-eta7^2)
    f8 = -alpha*eta8+beta*eta8^3+2*gam*eta8*(S-eta8^2)
    f9 = -alpha*eta9+beta*eta9^3+2*gam*eta9*(S-eta9^2)
    f10 = -alpha*eta10+beta*eta10^3+2*gam*eta10*(S-eta10^2)
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    S = eta1^2+eta2^2+eta3^2+eta4^2+eta5^2+eta6^2+eta7^2+eta8^2+eta9^2+eta10^2+eta11^2+eta12^2+eta13^2+eta14^2+eta15^2+eta16^2+eta17^2+eta18^2+eta19^2+eta20^2+eta21^2+eta22^2+eta23^2+eta24^2+eta25^2+eta26^2+eta27^2+eta28^2+eta29^2+eta30^2+eta31^2+eta32^2+eta33^2+eta34^2+eta35^2+eta36^2
    S1 = eta1^2+eta2^2+eta3^2

Geometry
  geom1 "几何 1" (2D, length unit m)
    sq1: Square "正方形 1" | size = 256
    fin: Finalize "形成联合体"

Physics
  w: WeakFormPDE "弱形式偏微分方程" on all domains
    dependent variable eta = {eta1, eta2, eta3, eta4, eta5, eta6, eta7, eta8, eta9, eta10, eta11, eta12, eta13, eta14, eta15, eta16, eta17, eta18, eta19, eta20, eta21, eta22, eta23, eta24, eta25, eta26, eta27, eta28, eta29, eta30, eta31, eta32, eta33, eta34, eta35, eta36}
    EquationForm.form = Automatic
    wfeq1: WeakFormPDE "弱形式偏微分方程 1" (default)
      weak = {-M*k*(test(eta1x)*eta1x+test(eta1y)*eta1y)-M*f1*test(eta1)-eta1t*test(eta1), -M*k*(test(eta2x)*eta2x+test(eta2y)*eta2y)-M*f2*test(eta2)-eta2t*test(eta2), -M*k*(test(eta3x)*eta3x+test(eta3y)*eta3y)-M*f3*test(eta3)-eta3t*test(eta3), -M*k*(test(eta4x)*eta4x+test(eta4y)*eta4y)-M*f4*test(eta4)-eta4t*test(eta4), -M*k*(test(eta5x)*eta5x+test(eta5y)*eta5y)-M*f5*test(eta5)-eta5t*test(eta5), -M*k*(test(eta6x)*eta6x+test(eta6y)*eta6y)-M*f6*test(eta6)-eta6t*test(eta6), -M*k*(test(eta7x)*eta7x+test(eta7y)*eta7y)-M*f7*test(eta7)-eta7t*test(eta7), -M*k*(test(eta8x)*eta8x+test(eta8y)*eta8y)-M*f8*test(eta8)-eta8t*test(eta8), -M*k*(test(eta9x)*eta9x+test(eta9y)*eta9y)-M*f9*test(eta9)-eta9t*test(eta9), -M*k*(test(eta10x)*eta10x+test(eta10y)*eta10y)-M*f10*test(eta10)-eta10t*test(eta10), -M*k*(test(eta11x)*eta11x+test(eta11y)*eta11y)-M*f11*test(eta11)-eta11t*test(eta11), -M*k*(test(eta12x)*eta12x+test(eta12y)*eta12y)-M*f12*test(eta12)-eta12t*test(eta12), -M*k*(test(eta13x)*eta13x+test(eta13y)*eta13y)-M*f13*test(eta13)-eta13t*test(eta13), -M*k*(test(eta14x)*eta14x+test(eta14y)*eta14y)-M*f14*test(eta14)-eta14t*test(eta14), -M*k*(test(eta15x)*eta15x+test(eta15y)*eta15y)-M*f15*test(eta15)-eta15t*test(eta15), -M*k*(test(eta16x)*eta16x+test(eta16y)*eta16y)-M*f16*test(eta16)-eta16t*test(eta16), -M*k*(test(eta17x)*eta17x+test(eta17y)*eta17y)-M*f17*test(eta17)-eta17t*test(eta17), -M*k*(test(eta18x)*eta18x+test(eta18y)*eta18y)-M*f18*test(eta18)-eta18t*test(eta18), -M*k*(test(eta19x)*eta19x+test(eta19y)*eta19y)-M*f19*test(eta19)-eta19t*test(eta19), -M*k*(test(eta20x)*eta20x+test(eta20y)*eta20y)-M*f20*test(eta20)-eta20t*test(eta20), -M*k*(test(eta21x)*eta21x+test(eta21y)*eta21y)-M*f21*test(eta21)-eta21t*test(eta21), -M*k*(test(eta22x)*eta22x+test(eta22y)*eta22y)-M*f22*test(eta22)-eta22t*test(eta22), -M*k*(test(eta23x)*eta23x+test(eta23y)*eta23y)-M*f23*test(eta23)-eta23t*test(eta23), -M*k*(test(eta24x)*eta24x+test(eta24y)*eta24y)-M*f24*test(eta24)-eta24t*test(eta24), -M*k*(test(eta25x)*eta25x+test(eta25y)*eta25y)-M*f25*test(eta25)-eta25t*test(eta25), -M*k*(test(eta26x)*eta26x+test(eta26y)*eta26y)-M*f26*test(eta26)-eta26t*test(eta26), -M*k*(test(eta27x)*eta27x+test(eta27y)*eta27y)-M*f27*test(eta27)-eta27t*test(eta27), -M*k*(test(eta28x)*eta28x+test(eta28y)*eta28y)-M*f28*test(eta28)-eta28t*test(eta28), -M*k*(test(eta29x)*eta29x+test(eta29y)*eta29y)-M*f29*test(eta29)-eta29t*test(eta29), -M*k*(test(eta30x)*eta30x+test(eta30y)*eta30y)-M*f30*test(eta30)-eta30t*test(eta30), -M*k*(test(eta31x)*eta31x+test(eta31y)*eta31y)-M*f31*test(eta31)-eta31t*test(eta31), -M*k*(test(eta32x)*eta32x+test(eta32y)*eta32y)-M*f32*test(eta32)-eta32t*test(eta32), -M*k*(test(eta33x)*eta33x+test(eta33y)*eta33y)-M*f33*test(eta33)-eta33t*test(eta33), -M*k*(test(eta34x)*eta34x+test(eta34y)*eta34y)-M*f34*test(eta34)-eta34t*test(eta34), -M*k*(test(eta35x)*eta35x+test(eta35y)*eta35y)-M*f35*test(eta35)-eta35t*test(eta35), -M*k*(test(eta36x)*eta36x+test(eta36y)*eta36y)-M*f36*test(eta36)-eta36t*test(eta36)}
    zflx1: ZeroFluxBoundary "零通量 1" (default)
    init1: init "初始值 1" (default)
      eta2 = rn1(x,y)
      eta3 = rn1(x,y)
      eta4 = rn1(x,y)
      eta5 = rn1(x,y)
      eta6 = rn1(x,y)
      eta7 = rn1(x,y)
      eta8 = rn1(x,y)
      eta9 = rn1(x,y)
      eta10 = rn1(x,y)
      eta11 = rn1(x,y)
      eta12 = rn1(x,y)
      eta13 = rn1(x,y)
      eta14 = rn1(x,y)
      eta15 = rn1(x,y)
      eta16 = rn1(x,y)
      eta17 = rn1(x,y)
      eta18 = rn1(x,y)
      eta19 = rn1(x,y)
      eta20 = rn1(x,y)
      eta21 = rn1(x,y)
      eta21t = 0
      eta22 = rn1(x,y)
      eta22t = 0
      eta23 = rn1(x,y)
      eta24 = rn1(x,y)
      eta25 = rn1(x,y)
      eta26 = rn1(x,y)
      eta27 = rn1(x,y)
      eta28 = rn1(x,y)
      eta29 = rn1(x,y)
      eta30 = rn1(x,y)
      eta31 = rn1(x,y)
      eta32 = rn1(x,y)
      eta33 = rn1(x,y)
      eta34 = rn1(x,y)
      eta35 = rn1(x,y)
      eta36 = rn1(x,y)
      eta1 = rn1(x,y)
    pc1: PeriodicCondition "周期性条件 1" on boundaries 2, 3 | destinationDomains: boundaries 3
    pc2: PeriodicCondition "周期性条件 2" on boundaries 1, 4 | destinationDomains: boundaries 4

Mesh
  mesh1 "网格 1"
    size: MeshSizeDefault "大小" | hmax = 2; hmin = 2; custom = on
    map1: Map "映射 1" on entire geometry
  mesh3 "网格 3"
    size: MeshSizeDefault "大小" | hmax = 4; hauto = 3
    map1: Map "映射 1" on remaining entities
  mesh4 "网格 4"
    size: MeshSizeDefault "大小" | hmax = 5.12; hauto = 2
    ftri1: FreeTri "自由三角形网格 1" on entire geometry

Studies
  std1 "2D_GG"
    time: Transient "瞬态" | tlist = range(0,0.25,500)
  std2 "MESH_TEST1"
    time: Transient "瞬态" | tlist = range(0,0.25,250); mesh = {geom1, mesh3}
  std3 "MESH_TEST2"
    time: Transient "瞬态" | tlist = range(0,0.25,250); mesh = {geom1, mesh4}

Solver configurations
  sol1 "解 1" (study std1)
    v1: Variables "因变量 1"
    t1: Time "瞬态求解器 1" | tlist = range(0,0.25,500)
      dDef: Direct "直接"
      fc1: FullyCoupled "全耦合 1" | linsolver = dDef
  sol2 "解 2" (study std2)
    v1: Variables "因变量 1"
    t1: Time "瞬态求解器 1" | tlist = range(0,0.25,250)
      dDef: Direct "直接"
      fc1: FullyCoupled "全耦合 1" | linsolver = dDef
  sol3 "解 3" (study std3)
    // same settings as sol2